# Title: 13 Метод Кирхгофа
# Description: Математическое моделирование электрических цепей
# Worksheet setting: ORIGIN = 1
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# Обозначения и единицы измерения исходных данных и переменных
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# Исходные данные электрической цепи:
# Источники ЭДС
E := [77; 202; 259]
# Cопротивления ветвей ЭЦ
R := [23; 4; 13; 22; 30; 26]
# Решение:
# Определяем число уравнений для нахождения токов в ветвях ЭЦ:
# - 1-е правило Кирхгофа: n1 =  k -1 =  4 - 1 = 3
# - 2-е правило Кирхгофа:  n2 =  p - n1 = 6 - 3 = 3,
# где: k - количество узлов цепи,  p - количество ветвей ЭЦ (токов).
# Система  уравнений в нормализованной форме
# (все неизвестные строго на своем месте в каждом уравнении, свободные члены в правой части) :
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# a )
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-I_1 - I_2 + 0*I_3 - I_4 + 0*I_5 + 0*I_6 == 0
# 1-е правило Кирхгофа
# n1 =  k -1 =  4 - 1 = 3
# b )
0 + 0 + 0 + I_4 - I_5 + I_6 == 0  # ! далее упрощаем запись !
(узлы)
# c )
I_1 + 0 - I_3 + 0 + I_5 + 0 == 0
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# I )
-R_1*I_1 + 0 + 0 + R_4*I_4 + R_5*I_5 + 0 == E_1
# 2-е правило Кирхгофа
# n2 =  p - n1 = 6 - 3 = 3
# II )
0 + R_2*I_2 + 0 - R_4*I_4 + 0 + R_6*I_6 == -E_2
(контуры)
# III )
0 + 0 + (-R_3*I_3) + 0 - R_5*I_5 - R_6*I_6 == E_3
# Для решение  системы линейных алгебраических уравнений (СЛАУ) можно выбрать любой метод, например метод  обратной  матрицы.
# Решение  СЛАУ  методом  обратной  матрицы
# (вектор неизвестных определяется умножением обратной матрицы коэффициентов на вектор правых частей уравнений).
ORIGIN := 1
# Токи в ветвях (A)
A := [
    -1, -1, 0, -1, 0, 0;
    0, 0, 0, 1, -1, -1;
    1, 0, -1, 0, 1, 0;
    -R[1], 0, 0, R[4], R[5], 0;
    0, R[2], 0, -R[4], 0, -R[6];
    0, 0, -R[3], 0, -R[5], R[6]
]
B := [0; 0; 0; E[1]; -E[2]; E[3]]
I := A^-1*B = [-3.00543; -0.102172; -5.02183; 3.1076; -2.0164; 5.124]
# Падения напряжений в ветвях (V) | Мощности, потребляемые в ветвях (W)
U := vectorize(I*R) = [-69.1249; -0.408687; -65.2838; 68.3672; -60.4921; 133.224]
P := vectorize(I*U) = [207.75; 0.0417562; 327.844; 212.458; 121.976; 682.641]
# Баланс (равенство) мощностей источников и потребителей (может служить проверкой расчета):
E_1*I_1 + E_2*I_2 + E_3*I_3 == R_1*I_1^2 + R_2*I_2^2 + R_3*I_3^2 + R_4*I_4^2 + R_5*I_5^2 + R_6*I_6^2  # disabled
# !!! Мощность источника ЭДС (E*I) положительна при совпадении направлений ЭДС (E) и тока (I), проходящего через источник, и отрицательна при встречных направлениях ЭДС и тока. В первом случае источник ЭДС (E) является генератором энергии, а во втором случае  потребителем энергии !!!
# Расчет левой части уравнения  (сумма мощностей источников):
Pi := E[1]*I[1] + E[2]*I[2] + E[3]*I[3]
Pi = -1552.71
# Расчет правой части уравнения  (сумма мощностей потребителей):
Pp := R[1]*I[1]^2 + R[2]*I[2]^2 + R[3]*I[3]^2 + R[4]*I[4]^2 + R[5]*I[5]^2 + R[6]*I[6]^2
Pp = 1552.71
# Разбаланс (Вт):
|Pi| - |Pp| = -9.09495e-13
# Разбаланс  (%):
(|Pi| - |Pp|)*100/|Pi| = -5.85746e-14
# Исследование электрической цепи :
# Для выполнения исследования ЭЦ следует поочередно изменять параметры цепи в заданном интервале согласно указаниям преподавателя, построить таблицу  и диаграмму по результатам исследования и провести их анализ.
# Исследование 1:
# Расчет параметров потребителя (Ip , Up  и  Pp) при изменении Е_2 в интервале 0 - 400 в  (потребитель - R_6)
E3 := [0, 40, 80, 120, 160, 200, 240, 280, 320, 360, 400]  # Вектор задания
# Расчет выполняется подпрограммой-функцией Analiz1(A, B, C).  См. ниже в выделенной области
# ! Для открытия или закрытия выделенной области дважды щелкните левой мышкой на линии или знаке !
# ! Подпрограмма-функция исследования 1 электрической цепи !
# А - матрица коэффициентов, В -  вектор свободных членов,  С  -  вектор задания
ORIGIN := 1
# А, В, С - локальные параметры действуют только в теле подпрограммы, поэтому сохранение и восстановление исходных данных (глобальных А и В), не требуется.
Analiz1(A, B, C) :=
    n ← rows(C)
    for i ∈ 1, 2 .. n
        B[6] ← C[i]
        I ← A^-1*B
        P[i, 1] ← C[i]
        P[i, 2] ← I[6]
        P[i, 3] ← I[6]*R[6]
        P[i, 4] ← I[6]*P[i, 3]
    P
# ! Подпрограмма-функция исследования 1 электрической цепи !
# Исследование 1 выполняется одним оператором
D1 := Analiz1(A, B, transpose(E3))
# Матрица-результат :
# Результат исследования 1: | E3  i6  U6  P6
Ip1 := D1[:, 2]
Up1 := D1[:, 3]
Pp1 := D1[:, 4]
transpose(E3) = [0; 40; 80; 120; 160; 200; 240; 280; 320; 360; 400]
D1 = [
    0, 3.11451, 80.9773, 252.205;
    40, 3.42486, 89.0463, 304.971;
    80, 3.7352, 97.1153, 362.746;
    120, 4.04555, 105.184, 425.529;
    160, 4.3559, 113.253, 493.32;
    200, 4.66624, 121.322, 566.119;
    240, 4.97659, 129.391, 643.927;
    280, 5.28694, 137.46, 726.744;
    320, 5.59728, 145.529, 814.569;
    360, 5.90763, 153.598, 907.402;
    400, 6.21797, 161.667, 1005.24
]
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# [component: inputs D1]
# Запись результата исследования 1 в формате Excel  (Raschet_1.xls) :
# Исследование 2:
# Расчет параметров потребителя (Ip , Up  и  Pp_())  при изменении R5 в интервале 0 - 50 ом
R3 := [0, 5, 10, 15, 20, 25, 30, 35, 40, 45, 50]  # Вектор задания
# Расчет выполняется подпрограммой-функцией Analiz2(A, B, C).  См. ниже в выделенной области
# ! Для открытия или закрытия выделенной области дважды щелкните левой мышкой на линии или знаке !
# ! Подпрограмма-функция исследования 2 электрической цепи !
# А - матрица коэффициентов, В -  вектор свободных членов,  С  -  вектор задания
ORIGIN := 1
# А, В, С - локальные параметры действуют только в теле подпрограммы, поэтому сохранение и восстановление исходных данных (глобальных А и В), не требуется.
Analiz2(A, B, C) :=
    n ← rows(C)
    for i ∈ 1, 2 .. n
        A[6, 3] ← -C[i]
        I ← A^-1*B
        P[i, 1] ← C[i]
        P[i, 2] ← I[6]
        P[i, 3] ← I[6]*R[6]
        P[i, 4] ← I[6]*P[i, 3]
    P
# ! Подпрограмма-функция исследования 2 электрической цепи !
# Задание выполняется одним оператором
D2 := Analiz2(A, B, transpose(R3))
# Результат исследования 2: | R3  i6  U6  P6
Ip2 := D2[:, 2]
Up2 := D2[:, 3]
Pp2 := D2[:, 4]
transpose(R3) = [0; 5; 10; 15; 20; 25; 30; 35; 40; 45; 50]
D2 = [
    0, 6.00871, 156.226, 938.719;
    5, 5.54697, 144.221, 799.991;
    10, 5.25368, 136.596, 717.631;
    15, 5.05089, 131.323, 663.298;
    20, 4.9023, 127.46, 624.846;
    25, 4.78874, 124.507, 596.234;
    30, 4.69914, 122.178, 574.13;
    35, 4.62663, 120.292, 556.549;
    40, 4.56676, 118.736, 542.237;
    45, 4.51647, 117.428, 530.362;
    50, 4.47365, 116.315, 520.352
]
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# Запись результата исследования в формате Excel  (Raschet_2.xls) :
# [component: inputs D2]
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# Проверка  адекватности  математической  модели объекта самому объекту исследования
# Математическую модель объекта исследования можно считать адекватной объекту в том случае, если результаты математического моделирования объекта и результаты эксперимента на самом объекте равны (сходны) в смысле некоторого критерия адекватности (численная характеристика сходства).
# Ниже представлен расчет трех различных критериев адекватности (см. справку и расчет).
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# Результат исследования 1. выполненного в MultiSim в режиме "Использовать допуски" (пункт 6 задания, столбцы 2 - 5 таб. 1.5.1) следует предварительно записать в Excel-файл: Experiment.xls в текущую папку с данным MathCad-файлом
# Чтение результата эксперимента, выполненного в MultiSim  (Experiment.xls) :
# [component: outputs De]
# E3  i6  U6  P6
Ip1e := De[:, 2]
De = [
    0, 3.27047, 20.026, 65.4944;
    40, 3.64575, 22.1797, 80.8618;
    80, 3.93261, 24.0066, 94.4087;
    120, 4.05603, 24.235, 98.2978;
    160, 4.40097, 26.13, 114.997;
    200, 4.76333, 28.855, 137.446;
    240, 5.21309, 31.6334, 164.908;
    280, 5.43933, 32.2031, 175.163;
    320, 5.64879, 34.8296, 196.745;
    360, 6.07505, 35.7091, 216.935;
    400, 6.35749, 38.6384, 245.643
]
Ip1e = [3.27047; 3.64575; 3.93261; 4.05603; 4.40097; 4.76333; 5.21309; 5.43933; 5.64879; 6.07505; 6.35749]
# Вектор экспериментальных значений тока Ip1e  (эксперимент в MultiSim)
transpose(Ip1e) = [3.27047, 3.64575, 3.93261, 4.05603, 4.40097, 4.76333, 5.21309, 5.43933, 5.64879, 6.07505, 6.35749]  # Транспонированный вектор
# Вектор расчетных значений тока потребителя Ip1 в исследовании 1 (модель в MathCad)
transpose(Ip1) = [3.11451, 3.42486, 3.7352, 4.04555, 4.3559, 4.66624, 4.97659, 5.28694, 5.59728, 5.90763, 6.21797]  # Транспонированный вектор
# Вектор отклонений расчетных значений тока от экспериментальных по модулю
Δ := Ip1e - Ip1
transpose(Δ) = [0.155958, 0.220892, 0.197405, 0.0104792, 0.045073, 0.0970869, 0.236501, 0.152395, 0.0515084, 0.167422, 0.139516]
# Для оценки адекватности математической модели выбраны три критерия:
# 1. Максимальное по модулю значение вектора относительных отклонений  в %
δ := vectorize(|Δ|)*100/vectorize(|Ip1e|)
transpose(δ) = [4.76866, 6.05888, 5.0197, 0.258361, 1.02416, 2.03821, 4.53667, 2.80172, 0.911849, 2.7559, 2.19452]
# annotation to a formula above: Математическое моделирование электрических цепей
# Максимальное отклонение в % =
max(δ) = 6.05888
# 2. Коэффициент корреляции (R) векторов расчетного и экспериментального
# corr(X1,X2) - это стандартная статистическая функция MathCad
Rk := corr(Ip1e, Ip1) = 0.997386
# 3. Квадрат смешанной корреляции (R^2) векторов расчетного и экспериментального:
# ! Для открытия или закрытия выделенной области дважды щелкните левой мышкой на линии или знаке !
# Подпрограмма-функция для расчета квадрата смешанной корреляции (R^2) между двумя векторами:  x1,  x2
ORIGIN := 1
R2(x1, x2) :=
    n ← rows(x1)
    se ← 0
    sx ← 0
    sx2 ← 0
    for i ∈ 1, 2 .. n
        se ← se + (x1[i] - x2[i])^2
        sx ← sx + x1[i]
        sx2 ← sx2 + x1[i]^2
    st ← sx2 - sx^2/n
    c ← 1 - se/st
# Подпрограмма-функция для расчета квадрата смешанной корреляции (R^2) между двумя векторами:  x1,  x2
# Расчет квадрата смешанной корреляции (R^2) векторов  Ip1, Ip1e
R2(Ip1e, Ip1) = 0.975885
# ! Математическая модель адекватна объекту !
# ПРИМЕЧАНИЕ  В дальнейшем при многократном использовании данной программы (MathCad-файла) для исследования электрической цепи рекомендуется:
# 1.  Все выделенные области, открытые для просмотра скрыть двойным щелчком левой мышки на знаке  области или на линии.
# 2. Блок "Проверка адекватности модели объекту" выполняется только один раз в номинальном режиме и далее может быть удален.
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