# Title: 13 Метод Кирхгофа
# Description: Математическое моделирование электрических цепей
# Worksheet setting: ORIGIN = 1
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# Обозначения и единицы измерения исходных данных и переменных
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# Исходные данные электрической цепи:
# Источники ЭДС
E := [200; 120; 100]
# Cопротивления ветвей ЭЦ
R := [10; 12; 20; 8; 5; 6]
# Решение:
# Определяем число уравнений для нахождения токов в ветвях ЭЦ:
# - 1-е правило Кирхгофа: n1 =  k -1 =  4 - 1 = 3
# - 2-е правило Кирхгофа:  n2 =  p - n1 = 6 - 3 = 3,
# где: k - количество узлов цепи,  p - количество ветвей ЭЦ (токов).
# Система  уравнений в нормализованной форме
# (все неизвестные строго на своем месте в каждом уравнении, свободные члены в правой части) :
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# a )
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I_1 - I_2 + I_3 + 0*I_4 + 0*I_5 + 0*I_6 == 0
# 1-е правило Кирхгофа
# n1 =  k -1 =  4 - 1 = 3
# b )
0 + I_2 + 0 - I_4 - I_5 + 0 == 0  # ! далее упрощаем запись !
(узлы)
# c )
-I_1 + 0 + 0 + I_4 + 0 + I_6 == 0
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# I )
R_1*I_1 + R_2*I_2 + 0 + R_4*I_4 + 0 + 0 == E_1 + E_2
# 2-е правило Кирхгофа
# n2 =  p - n1 = 6 - 3 = 3
# II )
0 + R_2*I_2 + R_3*I_3 + 0 + R_5*I_5 + 0 == E_2 + E_3
(контуры)
# III )
0 + 0 + 0 - R_4*I_4 + R_5*I_5 + R_6*I_6 == 0
# Для решение  системы линейных алгебраических уравнений (СЛАУ) можно выбрать любой метод, например метод  обратной  матрицы.
# Решение  СЛАУ  методом  обратной  матрицы
# (вектор неизвестных определяется умножением обратной матрицы коэффициентов на вектор правых частей уравнений).
ORIGIN := 1
# Токи в ветвях (A)
A := [
    1, -1, 1, 0, 0, 0;
    0, 1, 0, -1, -1, 0;
    -1, 0, 0, 1, 0, 1;
    R[1], R[2], 0, R[4], 0, 0;
    0, R[2], R[3], 0, R[5], 0;
    0, 0, 0, -R[4], R[5], R[6]
]
B := [0; 0; 0; E[1] + E[2]; E[2] + E[3]; 0]
I := A^-1*B = [11.0675; 12.8579; 1.79042; 6.87868; 5.97927; 4.18885]
# Падения напряжений в ветвях (V) | Мощности, потребляемые в ветвях (W)
U := vectorize(I*R) = [110.675; 154.295; 35.8083; 55.0294; 29.8963; 25.1331]
P := vectorize(I*U) = [1224.9; 1983.92; 64.1119; 378.53; 178.758; 105.279]
# Баланс (равенство) мощностей источников и потребителей (может служить проверкой расчета):
E_1*I_1 + E_2*I_2 + E_3*I_3 == R_1*I_1^2 + R_2*I_2^2 + R_3*I_3^2 + R_4*I_4^2 + R_5*I_5^2 + R_6*I_6^2  # disabled
# !!! Мощность источника ЭДС (E*I) положительна при совпадении направлений ЭДС (E) и тока (I), проходящего через источник, и отрицательна при встречных направлениях ЭДС и тока. В первом случае источник ЭДС (E) является генератором энергии, а во втором случае  потребителем энергии !!!
# Расчет левой части уравнения  (сумма мощностей источников):
Pi := E[1]*I[1] + E[2]*I[2] + E[3]*I[3]
Pi = 3935.5
# Расчет правой части уравнения  (сумма мощностей потребителей):
Pp := R[1]*I[1]^2 + R[2]*I[2]^2 + R[3]*I[3]^2 + R[4]*I[4]^2 + R[5]*I[5]^2 + R[6]*I[6]^2
Pp = 3935.5
# Разбаланс (Вт):
|Pi| - |Pp| = 4.54747e-13
# Разбаланс  (%):
(|Pi| - |Pp|)*100/|Pi| = 1.1555e-14
# Исследование электрической цепи :
# Для выполнения исследования ЭЦ следует поочередно изменять параметры цепи в заданном интервале согласно указаниям преподавателя, построить таблицу  и диаграмму по результатам исследования и провести их анализ.
# Исследование 1:
# Расчет параметров потребителя (Ip , Up  и  Pp) при изменении Е_2 в интервале 0 - 400 в  (потребитель - R_6)
E2 := [0, 40, 80, 120, 160, 200, 240, 280, 320, 360, 400]  # Вектор задания
# Расчет выполняется подпрограммой-функцией Analiz1(A, B, C).  См. ниже в выделенной области
# ! Для открытия или закрытия выделенной области дважды щелкните левой мышкой на линии или знаке !
# ! Подпрограмма-функция исследования 1 электрической цепи !
# А - матрица коэффициентов, В -  вектор свободных членов,  С  -  вектор задания
ORIGIN := 1
# А, В, С - локальные параметры действуют только в теле подпрограммы, поэтому сохранение и восстановление исходных данных (глобальных А и В), не требуется.
Analiz1(A, B, C) :=
    n ← rows(C)
    for i ∈ 1, 2 .. n
        B[4] ← E[1] + C[i]
        B[5] ← C[i] + E[3]
        I ← A^-1*B
        P[i, 1] ← C[i]
        P[i, 2] ← I[6]
        P[i, 3] ← I[6]*R[6]
        P[i, 4] ← I[6]*P[i, 3]
    P
# ! Подпрограмма-функция исследования 1 электрической цепи !
# Исследование 1 выполняется одним оператором
D1 := Analiz1(A, B, transpose(E2))
# Матрица-результат :
# Результат исследования 1: | E2  i6  U6  P6
Ip1 := D1[:, 2]
Up1 := D1[:, 3]
Pp1 := D1[:, 4]
transpose(E2) = [0; 40; 80; 120; 160; 200; 240; 280; 320; 360; 400]
D1 = [
    0, 3.26422, 19.5853, 63.9308;
    40, 3.57243, 21.4346, 76.5735;
    80, 3.88064, 23.2838, 90.3561;
    120, 4.18885, 25.1331, 105.279;
    160, 4.49706, 26.9823, 121.341;
    200, 4.80527, 28.8316, 138.544;
    240, 5.11348, 30.6809, 156.886;
    280, 5.42169, 32.5301, 176.368;
    320, 5.7299, 34.3794, 196.99;
    360, 6.03811, 36.2286, 218.752;
    400, 6.34632, 38.0779, 241.654
]
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# [component: inputs D1]
# Запись результата исследования 1 в формате Excel  (Raschet_1.xls) :
# Исследование 2:
# Расчет параметров потребителя (Ip , Up  и  Pp_())  при изменении R5 в интервале 0 - 50 ом
R5 := [0, 5, 10, 15, 20, 25, 30, 35, 40, 45, 50]  # Вектор задания
# Расчет выполняется подпрограммой-функцией Analiz2(A, B, C).  См. ниже в выделенной области
# ! Для открытия или закрытия выделенной области дважды щелкните левой мышкой на линии или знаке !
# ! Подпрограмма-функция исследования 2 электрической цепи !
# А - матрица коэффициентов, В -  вектор свободных членов,  С  -  вектор задания
ORIGIN := 1
# А, В, С - локальные параметры действуют только в теле подпрограммы, поэтому сохранение и восстановление исходных данных (глобальных А и В), не требуется.
Analiz2(A, B, C) :=
    n ← rows(C)
    for i ∈ 1, 2 .. n
        A[5, 5] ← C[i]
        A[6, 5] ← C[i]
        I ← A^-1*B
        P[i, 1] ← C[i]
        P[i, 2] ← I[6]
        P[i, 3] ← I[6]*R[6]
        P[i, 4] ← I[6]*P[i, 3]
    P
# ! Подпрограмма-функция исследования 2 электрической цепи !
# Задание выполняется одним оператором
D2 := Analiz2(A, B, transpose(R5))
# Результат исследования 2: | R5  i6  U6  P6
Ip2 := D2[:, 2]
Up2 := D2[:, 3]
Pp2 := D2[:, 4]
transpose(R5) = [0; 5; 10; 15; 20; 25; 30; 35; 40; 45; 50]
D2 = [
    0, 6.48464, 38.9078, 252.303;
    5, 4.18885, 25.1331, 105.279;
    10, 3.06633, 18.398, 56.4144;
    15, 2.40073, 14.4044, 34.5811;
    20, 1.96024, 11.7615, 23.0553;
    25, 1.64718, 9.8831, 16.2793;
    30, 1.41325, 8.47947, 11.9836;
    35, 1.2318, 7.39079, 9.10395;
    40, 1.08696, 6.52174, 7.08885;
    45, 0.968659, 5.81195, 5.6298;
    50, 0.870221, 5.22132, 4.5437
]
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# Запись результата исследования в формате Excel  (Raschet_2.xls) :
# [component: inputs D2]
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# Проверка  адекватности  математической  модели объекта самому объекту исследования
# Математическую модель объекта исследования можно считать адекватной объекту в том случае, если результаты математического моделирования объекта и результаты эксперимента на самом объекте равны (сходны) в смысле некоторого критерия адекватности (численная характеристика сходства).
# Ниже представлен расчет трех различных критериев адекватности (см. справку и расчет).
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# Результат исследования 1. выполненного в MultiSim в режиме "Использовать допуски" (пункт 6 задания, столбцы 2 - 5 таб. 1.5.1) следует предварительно записать в Excel-файл: Experiment.xls в текущую папку с данным MathCad-файлом
# Чтение результата эксперимента, выполненного в MultiSim  (Experiment.xls) :
# [component: outputs De]
# E2  i6  U6  P6
Ip1e := De[:, 2]
De = [
    0, 3.27047, 20.026, 65.4944;
    40, 3.64575, 22.1797, 80.8618;
    80, 3.93261, 24.0066, 94.4087;
    120, 4.05603, 24.235, 98.2978;
    160, 4.40097, 26.13, 114.997;
    200, 4.76333, 28.855, 137.446;
    240, 5.21309, 31.6334, 164.908;
    280, 5.43933, 32.2031, 175.163;
    320, 5.64879, 34.8296, 196.745;
    360, 6.07505, 35.7091, 216.935;
    400, 6.35749, 38.6384, 245.643
]
Ip1e = [3.27047; 3.64575; 3.93261; 4.05603; 4.40097; 4.76333; 5.21309; 5.43933; 5.64879; 6.07505; 6.35749]
# Вектор экспериментальных значений тока Ip1e  (эксперимент в MultiSim)
transpose(Ip1e) = [3.27047, 3.64575, 3.93261, 4.05603, 4.40097, 4.76333, 5.21309, 5.43933, 5.64879, 6.07505, 6.35749]  # Транспонированный вектор
# Вектор расчетных значений тока потребителя Ip1 в исследовании 1 (модель в MathCad)
transpose(Ip1) = [3.26422, 3.57243, 3.88064, 4.18885, 4.49706, 4.80527, 5.11348, 5.42169, 5.7299, 6.03811, 6.34632]  # Транспонированный вектор
# Вектор отклонений расчетных значений тока от экспериментальных по модулю
Δ := Ip1e - Ip1
transpose(Δ) = [0.00625033, 0.0733207, 0.0519712, -0.132818, -0.096088, -0.0419376, 0.0996128, 0.0176433, -0.0811063, 0.0369441, 0.0111745]
# Для оценки адекватности математической модели выбраны три критерия:
# 1. Максимальное по модулю значение вектора относительных отклонений  в %
δ := vectorize(|Δ|)*100/vectorize(|Ip1e|)
transpose(δ) = [0.191114, 2.01113, 1.32154, 3.27459, 2.18334, 0.880426, 1.91082, 0.324364, 1.43582, 0.608128, 0.175769]
# annotation to a formula above: Математическое моделирование электрических цепей
# Максимальное отклонение в % =
max(δ) = 3.27459
# 2. Коэффициент корреляции (R) векторов расчетного и экспериментального
# corr(X1,X2) - это стандартная статистическая функция MathCad
Rk := corr(Ip1e, Ip1) = 0.997386
# 3. Квадрат смешанной корреляции (R^2) векторов расчетного и экспериментального:
# ! Для открытия или закрытия выделенной области дважды щелкните левой мышкой на линии или знаке !
# Подпрограмма-функция для расчета квадрата смешанной корреляции (R^2) между двумя векторами:  x1,  x2
ORIGIN := 1
R2(x1, x2) :=
    n ← rows(x1)
    se ← 0
    sx ← 0
    sx2 ← 0
    for i ∈ 1, 2 .. n
        se ← se + (x1[i] - x2[i])^2
        sx ← sx + x1[i]
        sx2 ← sx2 + x1[i]^2
    st ← sx2 - sx^2/n
    c ← 1 - se/st
# Подпрограмма-функция для расчета квадрата смешанной корреляции (R^2) между двумя векторами:  x1,  x2
# Расчет квадрата смешанной корреляции (R^2) векторов  Ip1, Ip1e
R2(Ip1e, Ip1) = 0.994752
# ! Математическая модель адекватна объекту !
# ПРИМЕЧАНИЕ  В дальнейшем при многократном использовании данной программы (MathCad-файла) для исследования электрической цепи рекомендуется:
# 1.  Все выделенные области, открытые для просмотра скрыть двойным щелчком левой мышки на знаке  области или на линии.
# 2. Блок "Проверка адекватности модели объекту" выполняется только один раз в номинальном режиме и далее может быть удален.
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