# Title: 21_Метод_Кирхгофа АС
# Description: Математическое моделирование электрических цепей
# Worksheet setting: ORIGIN = 1
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# Обозначения и единицы измерения исходных данных и переменных
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# Исходные данные электрической цепи в векторном виде:
ORIGIN := 1
# Действующие значения ЭДС [В] | Начальные фазы [град] | Частота источников [1/с]
E_d := [77; 202; 259]
ψE := [0; 0; 0]
f := 50
# !!! Номер потребителя !!! | Индуктивность катушки 0.05 [Гн] | Емкость конденсатора 0.0001 [Ф]
ip := 6
Lp := 0.05
Cp := 0.0001
# !!! Для номинального режима индуктивность и емкость приравнять нулю !!!
# Генерация  векторов : | Индуктивности | Емкости
# Резисторы
k := 1 .. 6
L[k] := if(k == ip, Lp, 0)
C[k] := if(k == ip, Cp, 0)
R := [23; 4; 13; 22; 30; 26]
L = [0; 0; 0; 0; 0; 0.05]
C = [0; 0; 0; 0; 0; 0.0001]
# Решение:
ω := 2*π*f
ω = 314.159
k := 1 .. 6
X_L[k] := ω*L[k]
X_C[k] :=
    0 if C[k] == 0
    1/(ω*C[k]) if C[k] > 0
X_L = [0; 0; 0; 0; 0; 15.708]
X_C = [0; 0; 0; 0; 0; 31.831]
# Комплексные значения параметров цепи: | Обозначение мнимой единицы 1j == 1i
# Источники напряжения:
E := vectorize(E_d*exp(1j*ψE))
E = [77; 202; 259]
# Полные сопротивления ветвей:
Z := R + 1j*(X_L - X_C)
Z = [23; 4; 13; 22; 30; 26 - 16.123i]
Z_d := vectorize(|Z|)
Z_d = [23; 4; 13; 22; 30; 30.5933]
φ := vectorize(arg(Z))
φ = [0; 0; 0; 0; 0; -31.8037] deg
# Временная диаграмма ЭДС источников :
t := 0, 0.0005 .. 0.02  # Мгновенные значения источников ЭДС
e1(t) := E_d[1]*sqrt(2)*sin(ω*t + ψE[1])
e2(t) := E_d[2]*sqrt(2)*sin(ω*t + ψE[2])
e3(t) := E_d[3]*sqrt(2)*sin(ω*t + ψE[3])
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ψE = [0; 0; 0]
# Рис. 2.1.2. Временная диаграмма источников ЭДС:  e1(t), e2(t) и e3(t)
# Решение СЛАУ для нахождения токов (правила Кирхгофа) :
# Определяем число уравнений для нахождения токов в ветвях цепи:
# - 1-й закон Кирхгофа: n1 =  k -1 =  4 - 1 = 3
# - 2-й закон Кирхгофа:  n2 =  p - n1 = 6 - 3 = 3,
# где: k - количество узлов цепи,  p - количество ветвей цепи (токов).
# Система  уравнений в нормализованной форме
# (все неизвестные строго на своем месте в каждом уравнении, свободные члены в правой части) :
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# a )
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I_1 - I_2 + I_3 + 0*I_4 + 0*I_5 + 0*I_6 == 0
# 1-й закон Кирхгофа
# n1 =  k -1 =  4 - 1 = 3
# b )
0 + I_2 + 0 - I_4 - I_5 + 0 == 0  # ! далее упрощаем запись !
(узлы)
# c )
-I_1 + 0 + 0 + I_4 + 0 + I_6 == 0
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# I )
Z_1*I_1 + Z_2*I_2 + 0 + Z_4*I_4 + 0 + 0 == E_1 + E_2
# 2-й закон Кирхгофа
# n2 =  p - n1 = 6 - 3 = 3
# II )
0 + Z_2*I_2 + Z_3*I_3 + 0 + Z_5*I_5 + 0 == E_2 + E_3
(контуры)
# III )
0 + 0 + 0 - Z_4*I_4 + Z_5*I_5 + Z_6*I_6 == 0
# Для решение  системы линейных алгебраических уравнений (СЛАУ) можно выбрать любой метод, например:  метод  обратной  матрицы
# Решение  СЛАУ  методом  обратной  матрицы
# (вектор неизвестных определяется умножением обратной матрицы коэффициентов на вектор правых частей уравнений).
ORIGIN := 1
A := [
    0, 0, 0, 1, 1, -1;
    0, -1, -1, 0, 0, 1;
    1, 1, 0, -1, 0, 0;
    Z[1], 0, 0, Z[4], (-Z)[5], 0;
    0, Z[2], 0, Z[4], 0, Z[6];
    0, 0, Z[3], 0, Z[5], Z[6]
]
B := [0; 0; 0; E[1]; E[2]; E[3]]
I := A^-1*B
I = [3.04957 - 0.115086i; -0.340519 + 1.15433i; 4.80753 + 0.558792i; 2.70905 + 1.03924i; 1.75797 + 0.673878i; 4.46701 + 1.71312i]
# Действующие значения токов  на участках цепи: | Сопряженный вектор токов:
I_d := vectorize(|I|) = [3.05174; 1.20351; 4.8399; 2.90154; 1.8827; 4.78424]
ψI := vectorize(arg(I)) = [-2.16123; 106.436; 6.62989; 20.9878; 20.9732; 20.9821] deg
conj(I) = [3.04957 + 0.115086i; -0.340519 - 1.15433i; 4.80753 - 0.558792i; 2.70905 - 1.03924i; 1.75797 - 0.673878i; 4.46701 - 1.71312i]
ψIs := vectorize(arg(conj(I))) = [2.16123; -106.436; -6.62989; -20.9878; -20.9732; -20.9821] deg
# Комплексные значения падений напряжения на сопротивлениях цепи:
U := vectorize(I*Z) = [70.14 - 2.64698i; -1.36207 + 4.61731i; 62.4979 + 7.2643i; 59.599 + 22.8633i; 52.739 + 20.2163i; 143.763 - 27.4806i]
U_d := vectorize(|U|) = [70.1899; 4.81403; 62.9187; 63.834; 56.481; 146.366]
ψU := vectorize(arg(U)) = [-2.16123; 106.436; 6.62989; 20.9878; 20.9732; -10.8217] deg
# Активная мощность потребляемая в ветвях:
P := vectorize(Re(U*conj(I))) = [214.201; 5.79371; 304.52; 185.217; 106.337; 595.114]
P_d := vectorize(|P|) = [214.201; 5.79371; 304.52; 185.217; 106.337; 595.114]
Pds := sum(P_d) = 1411.18
# Реактивная мощность в ветвях:
Q := vectorize(Im(U*conj(I))) = [0; 0; 0; 0; 0; -369.04]
Q_d := vectorize(|Q|) = [0; 0; 0; 0; 0; 369.04]
Qds := sum(Q_d) = 369.04
# Полная мощность в ветвях:
Sm := vectorize(U*conj(I)) = [214.201; 5.79371; 304.52; 185.217; 106.337; 595.114 - 369.04i]
Sm_d := vectorize(|Sm|) = [214.201; 5.79371; 304.52; 185.217; 106.337; 700.251]
Sds := sqrt(Pds^2 + Qds^2) = 1458.64
# ___ Проверка ___
S1 := sqrt(sum(P_d)^2 + sum(Q_d)^2) = 1458.64
# Для  проверки  расчета  составляем  баланс  мощностей:
E_1*I_1 + E_2*I_2 + E_3*I_3 == Z_1*I_1^2 + Z_2*I_2^2 + Z_3*I_3^2 + Z_4*I_4^2 + Z_5*I_5^2 + Z_6*I_6^2
# !!! Мощность источника ЭДС (E*I) положительна при совпадении направлений ЭДС (E) и тока (I), проходящего через источник, и отрицательна при встречных направлениях ЭДС и тока. В первом случае источник ЭДС (E) является генератором энергии, а во втором случае  потребителем энергии !!!
# Расчет левой части уравнения - общая мощность генерации электроэнергии
Si := E[1]*I[1] + E[2]*I[2] + E[3]*I[3]
Si = 1411.18 + 369.04i
# Расчет правой части уравнения - общая мощность потребления электроэнергии
Sp := Z[1]*I[1]^2 + Z[2]*I[2]^2 + Z[3]*I[3]^2 + Z[4]*I[4]^2 + Z[5]*I[5]^2 + Z[6]*I[6]^2
Sp = 1411.18 + 369.04i
# Разбаланс (Вт) :
|Si| - |Sp| = 4.54747e-13
Spd := |Sp| = 1458.64
# Разбаланс  (%):
(|Si| - |Sp|)*100/|Si| = 3.11761e-14
# Временная диаграмма напряжения, тока и мощности потребителя RLC:
# Начальные ( t = 0) фазы напряжения  Up, тока  Ip.  Мощность приемника RLC:
ψ_Up := arg(U[ip]) = -10.8217 deg
ψ_Ip := arg(I[ip]) = 20.9821 deg
P[ip] = 595.114
Q[ip] = -369.04
# Угол сдвига фазы тока  Ip  от  напряжения  Up и коэффициент мощности:
φ_p := ψ_Up - ψ_Ip = -31.8037 deg
sin(φ_p) = -0.527011
Cm := cos(φ_p) = 0.849858
# Все функции на диаграмме строят с условным сдвигом по оси времени (-ψ_Up/(360*f)), что соответствует повороту всех  вектор-функций на плоскости  {Re - Im}  на угол (-ψ_Up ).
# В этом случае вектор-напряжение Up совпадает с осью Re, а ток фактический и ток сопряженный симметричны относительно оси Re и напряжения:  ( -φ □ + φ)
# Масштаб тока :
mi := 10
# Масштаб мощности :
ms := 0.06
# Аргумент - время (t).  Интервал изменения: 0 - 0,02сек (период). Шаг:  0,0005сек
t := 0, 0.0001 .. 0.02  # Ток сопряженный мгновенный:
up(t) := U_d[ip]*sqrt(2)*sin(ω*t)
ipp(t) := I_d[ip]*sqrt(2)*sin(ω*t - φ_p)
ips(t) := I_d[ip]*sqrt(2)*sin(ω*t + φ_p)
# Проверка: s(t) = p(t) + q(t)
sp(t) := up(t)*ips(t)
pp(t) := P[ip]*(1 - cos(2*ω*t))
qp(t) := Q[ip]*sin(2*ω*t)
pq(t) := pp(t) + qp(t)
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# Рис. 2.1.5.  Временная диаграмма тока  ip(t), напряжения up(t)  и мощности pp(t), qp(t), sp(t) потребителя
# ПРИМЕЧАНИЕ в скрытой области:
# Вычисление угла сдвига фазы и коэффициента мощности по диаграмме 2.1.5
# Вычисленные ниже значения на диаграмме будут иметь место,  если в иследуемую ветвь Rp (приемник)  включить последовательно :
# -  катушку индуктивностью  Lp  =  0,05 Генри,
# -  конденсатор емкостью  Cp =  0,0001 Фарады.
# Угол сдвига фазы тока  Ip от напряжения Up на диаграмме 2.1.5 и коэффициент мощности :
dt := 0.00704 - 0.01
dt = -0.00296
φ_pd := dt*2*π/0.02
φ_pd = -53.28 deg
# annotation to a formula above: Математическое моделирование электрических цепей
Cmd := cos(φ_pd)
Cmd = 0.597905
# !!! Значения угла сдвига фаз и коэффициент мощности, вычисленные по диаграмме близки  расчитанным выше  !!!
