# Title: 21_Метод_Кирхгофа АС
# Description: Математическое моделирование электрических цепей
# Worksheet setting: ORIGIN = 1
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# Обозначения и единицы измерения исходных данных и переменных
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# Исходные данные электрической цепи в векторном виде:
# Действующие значения ЭДС | Начальные фазы | Частота источников
E_d := [200; 120; 100]
ψE := [0; 0; 0]
f := 50
# Активные сопротивления | Индуктивности | Емкости
R := [10; 12; 20; 8; 5; 6]
L := [0; 0; 0; 0; 0; 0]
C := [0; 0; 0; 0; 0; 0]
______________________________________________________________________________________
ORIGIN := 1
# Решение:
ω := 2*π*f
ω = 314.159
k := 1 .. 6
X_L[k] := ω*L[k]
X_C[k] :=
    0 if C[k] == 0
    1/(ω*C[k]) if C[k] > 0
X_L = [0; 0; 0; 0; 0; 0]
X_C = [0; 0; 0; 0; 0; 0]
# Комплексные значения параметров цепи: | Обозначение мнимой единицы 1j == 1i
# Источники напряжения:
E := vectorize(E_d*exp(1j*ψE))
E = [200; 120; 100]
# Полные сопротивления ветвей:
Z := R + 1j*(X_L - X_C)
Z = [10; 12; 20; 8; 5; 6]
Z_d := vectorize(|Z|)
Z_d = [10; 12; 20; 8; 5; 6]
φ := vectorize(arg(Z))
φ = [0; 0; 0; 0; 0; 0] deg
# Временная диаграмма ЭДС источников :
t := 0, 0.0005 .. 0.02  # Мгновенные значения источников ЭДС
e1(t) := E_d[1]*sqrt(2)*sin(ω*t + ψE[1])
e2(t) := E_d[2]*sqrt(2)*sin(ω*t + ψE[2])
e3(t) := E_d[3]*sqrt(2)*sin(ω*t + ψE[3])
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ψE = [0; 0; 0]
# Рис. 2.1.2. Временная диаграмма источников ЭДС:  e1(t), e2(t) и e3(t)
# Решение СЛАУ для нахождения токов (правила Кирхгофа) :
# Определяем число уравнений для нахождения токов в ветвях цепи:
# - 1-й закон Кирхгофа: n1 =  k -1 =  4 - 1 = 3
# - 2-й закон Кирхгофа:  n2 =  p - n1 = 6 - 3 = 3,
# где: k - количество узлов цепи,  p - количество ветвей цепи (токов).
# Система  уравнений в нормализованной форме
# (все неизвестные строго на своем месте в каждом уравнении, свободные члены в правой части) :
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# a )
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I_1 - I_2 + I_3 + 0*I_4 + 0*I_5 + 0*I_6 == 0
# 1-й закон Кирхгофа
# n1 =  k -1 =  4 - 1 = 3
# b )
0 + I_2 + 0 - I_4 - I_5 + 0 == 0  # ! далее упрощаем запись !
(узлы)
# c )
-I_1 + 0 + 0 + I_4 + 0 + I_6 == 0
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# I )
Z_1*I_1 + Z_2*I_2 + 0 + Z_4*I_4 + 0 + 0 == E_1 + E_2
# 2-й закон Кирхгофа
# n2 =  p - n1 = 6 - 3 = 3
# II )
0 + Z_2*I_2 + Z_3*I_3 + 0 + Z_5*I_5 + 0 == E_2 + E_3
(контуры)
# III )
0 + 0 + 0 - Z_4*I_4 + Z_5*I_5 + Z_6*I_6 == 0
# Для решение  системы линейных алгебраических уравнений (СЛАУ) можно выбрать любой метод, например:  метод  обратной  матрицы
# Решение  СЛАУ  методом  обратной  матрицы
# (вектор неизвестных определяется умножением обратной матрицы коэффициентов на вектор правых частей уравнений).
ORIGIN := 1
A := [
    1, -1, 1, 0, 0, 0;
    0, 1, 0, -1, -1, 0;
    -1, 0, 0, 1, 0, 1;
    Z[1], Z[2], 0, Z[4], 0, 0;
    0, Z[2], Z[3], 0, Z[5], 0;
    0, 0, 0, -Z[4], Z[5], Z[6]
]
B := [0; 0; 0; E[1] + E[2]; E[2] + E[3]; 0]
I := A^-1*B
I = [11.0675; 12.8579; 1.79042; 6.87868; 5.97927; 4.18885]
# Действующие значения токов  на участках цепи: | Сопряженный вектор токов:
I_d := vectorize(|I|) = [11.0675; 12.8579; 1.79042; 6.87868; 5.97927; 4.18885]
ψI := vectorize(arg(I)) = [0; 0; 0; 0; 0; 0] deg
conj(I) = [11.0675; 12.8579; 1.79042; 6.87868; 5.97927; 4.18885]
ψIs := vectorize(arg(conj(I))) = [0; 0; 0; 0; 0; 0] deg
# Комплексные значения падений напряжения на сопротивлениях цепи:
U := vectorize(I*Z) = [110.675; 154.295; 35.8083; 55.0294; 29.8963; 25.1331]
U_d := vectorize(|U|) = [110.675; 154.295; 35.8083; 55.0294; 29.8963; 25.1331]
ψU := vectorize(arg(U)) = [0; 0; 0; 0; 0; 0] deg
# Активная мощность потребляемая в ветвях:
P := vectorize(Re(U*conj(I))) = [1224.9; 1983.92; 64.1119; 378.53; 178.758; 105.279]
P_d := vectorize(|P|) = [1224.9; 1983.92; 64.1119; 378.53; 178.758; 105.279]
Pds := sum(P_d) = 3935.5
# Реактивная мощность в ветвях:
Q := vectorize(Im(U*conj(I))) = [0; 0; 0; 0; 0; 0]
Q_d := vectorize(|Q|) = [0; 0; 0; 0; 0; 0]
Qds := sum(Q_d) = 0
# Полная мощность в ветвях:
Sm := vectorize(U*conj(I)) = [1224.9; 1983.92; 64.1119; 378.53; 178.758; 105.279]
Sm_d := vectorize(|Sm|) = [1224.9; 1983.92; 64.1119; 378.53; 178.758; 105.279]
Sds := sqrt(Pds^2 + Qds^2) = 3935.5
# ___ Проверка ___
S1 := sqrt(sum(P_d)^2 + sum(Q_d)^2) = 3935.5
# Для  проверки  расчета  составляем  баланс  мощностей:
E_1*I_1 + E_2*I_2 + E_3*I_3 == Z_1*I_1^2 + Z_2*I_2^2 + Z_3*I_3^2 + Z_4*I_4^2 + Z_5*I_5^2 + Z_6*I_6^2
# !!! Мощность источника ЭДС (E*I) положительна при совпадении направлений ЭДС (E) и тока (I), проходящего через источник, и отрицательна при встречных направлениях ЭДС и тока. В первом случае источник ЭДС (E) является генератором энергии, а во втором случае  потребителем энергии !!!
# Расчет левой части уравнения
Si := E[1]*I[1] + E[2]*I[2] + E[3]*I[3]
Si = 3935.5
# Расчет правой части уравнения
Sp := Z[1]*I[1]^2 + Z[2]*I[2]^2 + Z[3]*I[3]^2 + Z[4]*I[4]^2 + Z[5]*I[5]^2 + Z[6]*I[6]^2
Sp = 3935.5
# Разбаланс (Вт) :
|Si| - |Sp| = 4.54747e-13
Spd := |Sp| = 3935.5
# Разбаланс  (%):
(|Si| - |Sp|)*100/|Si| = 1.1555e-14
# Временная диаграмма напряжения, тока и мощности приемника R6:
# Начальные ( t = 0) фазы тока  I6, напряжения  U6 и активная мощность приемника R6 :
ψ_U6 := arg(U[6]) = 0 deg
ψ_I6 := arg(I[6]) = 0 deg
P[6] = 105.279
Q[6] = 0
# annotation to a formula above: Математическое моделирование электрических цепей
# Угол сдвига фазы тока  I6  от  напряжения  U6 и коэффициент мощности:
φ_6 := ψ_U6 - ψ_I6
φ_6 = 0 deg
sin(φ_6) = 0
Cm := cos(φ_6)
Cm = 1
# Все функции на диаграмме строят с условным сдвигом по оси времени (-ψ_U6/(360*f)), что соответствует повороту всех  вектор-функций на плоскости  {Re - Im}  на угол (-ψ_U6 ).
# В этом случае вектор-напряжение совпадает с осью Re, а ток фактический и ток сопряженный симметричны относительно оси Re и напряжения:  ( -φ □ + φ)
# Масштаб тока :
mi := 10
# Масштаб мощности :
ms := 1
# Аргумент - время (t).  Интервал изменения: 0 - 0,02сек (период). Шаг:  0,0005сек
t := 0, 0.0001 .. 0.02  # Ток сопряженный мгновенный:
u6(t) := U_d[6]*sqrt(2)*sin(ω*t)
i6(t) := I_d[6]*sqrt(2)*sin(ω*t - φ_6)
i6s(t) := I_d[6]*sqrt(2)*sin(ω*t + φ_6)
# Проверка: s(t) = p(t) + q(t)
s6(t) := u6(t)*i6s(t)
p6(t) := P[6]*(1 - cos(2*ω*t))
q6(t) := Q[6]*sin(2*ω*t)
pq(t) := p6(t) + q6(t)
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# Рис. 2.1.5.  Временная диаграмма тока  i6(t), напряжения u6(t)  и мощности p6(t), q6(t), s6(t)
# Исследования электрической цепи № 1 и №2, а также проверка адекватности не входит в план лаб. №2 (выполнять не требуется).
# ...
# ...Но обязательно сравнить с результатами лаб. № 1...
# Исследование электрической цепи (см. лаб. № 1):
# Для выполнения пункта 6 задания следует изменить параметры цепи и интервал их изменения согласно полученным указаниям, построить таблицу  и диаграмму по результатам исследования и провести анализ.
# Пример:
# Расчет изменения  I_6 , U_6  и  P_6  при изменении
# Е_2 (0, 40, 80, 120, 160, 200, 240, 280, 320, 400)
E2 := [0, 40, 80, 120, 160, 200, 240, 280, 320, 360, 400]  # Вектор задания
# Для расчета используется подпрограмма-функция "Analiz1(A,B,C)"
# ! Для открытия или закрытия выделенной области дважды щелкните левой мышкой на линии или знаке !
# ! Подпрограмма-функция заданного исследования электрической цепи !
# А - матрица коэффициентов, В -  вектор свободных членов,  С  -  вектор задания
ORIGIN := 1
Analiz1(A, B, C) :=
    n ← rows(C)
    for i ∈ 1, 2 .. n
        B[4] ← E[1] + C[i]
        B[5] ← C[i] + E[3]
        I ← A^-1*B
        P[i, 1] ← C[i]
        P[i, 2] ← I[6]
        P[i, 3] ← I[6]*Z[6]
        P[i, 4] ← Re(I[6]*P[i, 3])
    P
# ! Подпрограмма-функция заданного исследования электрической цепи !
# Задание выполняется одним оператором
D1 := Analiz1(A, B, transpose(E2))
# 1 Результат исследования :
# E2  i6  U6  P6
I61 := D1[:, 2]
U61 := D1[:, 3]
D1 = [
    0, 3.26422, 19.5853, 63.9308;
    40, 3.57243, 21.4346, 76.5735;
    80, 3.88064, 23.2838, 90.3561;
    120, 4.18885, 25.1331, 105.279;
    160, 4.49706, 26.9823, 121.341;
    200, 4.80527, 28.8316, 138.544;
    240, 5.11348, 30.6809, 156.886;
    280, 5.42169, 32.5301, 176.368;
    320, 5.7299, 34.3794, 196.99;
    360, 6.03811, 36.2286, 218.752;
    400, 6.34632, 38.0779, 241.654
]
P61 := D1[:, 4]
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# Рис.2.1.3. Зависимость тока I6, напряжения U6 и мощности P6  от ЭДС  E2
# Запись результата исследования в формате Excel  (Raschet_1.xls) :
# [component: inputs D1]
# Пример 2:
# Расчет изменения  I_6 , U_6  и  P_6  при изменении  R_5 (0, 5, 10, 15, 20, 25, 30, 35, 40, 45, 50)
R5 := [0, 5, 10, 15, 20, 25, 30, 35, 40, 45, 50]  # Вектор задания
# ! Для открытия или закрытия выделенной области дважды щелкните левой мышкой на линии или знаке !
# ! Подпрограмма-функция заданного исследования электрической цепи !
# А - матрица коэффициентов, В -  вектор свободных членов,  С  -  вектор задания
ORIGIN := 1
Analiz3(A, B, C) :=
    n ← rows(C)
    for i ∈ 1, 2 .. n
        A[5, 5] ← C[i]
        A[6, 5] ← C[i]
        I ← A^-1*B
        P[i, 1] ← C[i]
        P[i, 2] ← I[6]
        P[i, 3] ← I[6]*Z[6]
        P[i, 4] ← Re(I[6]*P[i, 3])
    P
# ! Подпрограмма-функция заданного исследования электрической цепи !
# Задание выполняется одним оператором
D2 := Analiz3(A, B, transpose(R5))
# 2 Результат исследования :
# E2  i6  U6  P6
I62 := D2[:, 2]
U62 := D2[:, 3]
P62 := D2[:, 4]
D2 = [
    0, 6.48464, 38.9078, 252.303;
    5, 4.18885, 25.1331, 105.279;
    10, 3.06633, 18.398, 56.4144;
    15, 2.40073, 14.4044, 34.5811;
    20, 1.96024, 11.7615, 23.0553;
    25, 1.64718, 9.8831, 16.2793;
    30, 1.41325, 8.47947, 11.9836;
    35, 1.2318, 7.39079, 9.10395;
    40, 1.08696, 6.52174, 7.08885;
    45, 0.968659, 5.81195, 5.6298;
    50, 0.870221, 5.22132, 4.5437
]
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# Рис.2.1.4. Зависимость тока I6, напряжения U6 и мощности P6  от R5
# Запись результата исследования в формате Excel  (Raschet_2.xls) :
# [component: inputs D2]
# Проверка  адекватности  математической  модели
# ПРИМЕЧАНИЕ:  Проверка выполняется корректно, только в случае "активной нагрузки" (L=0. C=0), для
# которого был выполнен  эксперимент.
# Математическую модель объекта исследования можно считать адекватной объекту в том случае, если результаты математического моделирования объекта и результаты эксперимента на самом объекте равны (сходны) в смысле некоторого критерия адекватности (численная характеристика сходства).
# Ниже представлен расчет трех различных критериев адекватности (см. справку и расчет).
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# Чтение результата эксперимента в MultiSim  (Experiment.xls) :
# [component: outputs Dr]
# E2  i6  U6  P6
Dr = [
    0, 3.27047, 20.026, 65.4944;
    40, 3.64575, 22.1797, 80.8618;
    80, 3.93261, 24.0066, 94.4087;
    120, 4.05603, 24.235, 98.2978;
    160, 4.40097, 26.13, 114.997;
    200, 4.76333, 28.855, 137.446;
    240, 5.21309, 31.6334, 164.908;
    280, 5.43933, 32.2031, 175.163;
    320, 5.64879, 34.8296, 196.745;
    360, 6.07505, 35.7091, 216.935;
    400, 6.35749, 38.6384, 245.643
]
I61e := Dr[:, 2] = [3.27047; 3.64575; 3.93261; 4.05603; 4.40097; 4.76333; 5.21309; 5.43933; 5.64879; 6.07505; 6.35749]
# Вектора экспериментальных и расчетных значений тока I_6 :
transpose(I61e) = [3.27047, 3.64575, 3.93261, 4.05603, 4.40097, 4.76333, 5.21309, 5.43933, 5.64879, 6.07505, 6.35749]  # Эксперимент
transpose(I61) = [3.26422, 3.57243, 3.88064, 4.18885, 4.49706, 4.80527, 5.11348, 5.42169, 5.7299, 6.03811, 6.34632]  # Расчет
# Вектор отклонений расчетных значений от экспериментальных
Δ := I61e - I61
transpose(Δ) = [0.00625033, 0.0733207, 0.0519712, -0.132818, -0.096088, -0.0419376, 0.0996128, 0.0176433, -0.0811063, 0.0369441, 0.0111745]
# Максимальное отклонение в % =
# 1. Вектор относительных отклонений  в %
δ := vectorize(|Δ|)*100/vectorize(|I61e|)
max(δ) = 3.27459
transpose(δ) = [0.191114, 2.01113, 1.32154, 3.27459, 2.18334, 0.880426, 1.91082, 0.324364, 1.43582, 0.608128, 0.175769]
# 2. Коэффициент корреляции (R) векторов расчетного и экспериментального
# можно использовать для оценки адекватности математической модели :
# corr(X1,X2) - это стандартная статистическая функция MultiSim
Rk := corr(I61, I61e) = 0.997386
# 3. Квадрат смешанной корреляции (R^2) векторов расчетного и экспериментального
# также можно использовать для оценки адекватности математической модели :
# ! Для открытия или закрытия выделенной области дважды щелкните левой мышкой на линии или знаке !
# Подпрограмма-функция для расчета квадрата смешанной корреляции (R^2) между двумя векторами:  x1,  x2
ORIGIN := 1
R2(x1, x2) :=
    n ← rows(x1)
    se ← 0
    sx ← 0
    sx2 ← 0
    for i ∈ 1, 2 .. n
        se ← se + (x1[i] - x2[i])^2
        sx ← sx + x1[i]
        sx2 ← sx2 + x1[i]^2
    st ← sx2 - sx^2/n
    c ← 1 - se/st
# Подпрограмма-функция для расчета квадрата смешанной корреляции (R^2) между двумя векторами:  x1,  x2
# Расчет квадрата смешанной корреляции (R^2) векторов
Ra := R2(I61e, I61)
Ra = 0.994752
# ! Математическая модель адекватна объекту !
