# Title: 21_Метод_Кирхгофа АС
# Description: Математическое моделирование электрических цепей
# Worksheet setting: ORIGIN = 1
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# Обозначения и единицы измерения исходных данных и переменных
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# Исходные данные электрической цепи в векторном виде:
# Действующие значения ЭДС [В] | Начальные фазы [град] | Частота источников [1/с]
E_d := [200; 120; 100]
ψE := [0; 0; 0]
f := 50
# Номер потребителя | Индуктивность катушки [Гн] | Емкость конденсатора [Ф]
ip := 6
Lp := 0.05
Cp := 0.0001
# !!! Для номинального режима индуктивность и емкость приравнять нулю !!!
# Генерация  векторов : | Индуктивности | Емкости
# Резисторы
k := 1 .. 6
L[k] := if(k == ip, Lp, 0)
C[k] := if(k == ip, Cp, 0)
R := [10; 12; 20; 8; 5; 6]
L = [0; 0; 0; 0; 0; 0.05]
C = [0; 0; 0; 0; 0; 0.0001]
ORIGIN := 1
# Решение:
ω := 2*π*f
ω = 314.159
k := 1 .. 6
X_L[k] := ω*L[k]
X_C[k] :=
    0 if C[k] == 0
    1/(ω*C[k]) if C[k] > 0
X_L = [0; 0; 0; 0; 0; 15.708]
X_C = [0; 0; 0; 0; 0; 31.831]
# Комплексные значения параметров цепи: | Обозначение мнимой единицы 1j == 1i
# Источники напряжения:
E := vectorize(E_d*exp(1j*ψE))
E = [200; 120; 100]
# Полные сопротивления ветвей:
Z := R + 1j*(X_L - X_C)
Z = [10; 12; 20; 8; 5; 6 - 16.123i]
Z_d := vectorize(|Z|)
Z_d = [10; 12; 20; 8; 5; 17.2033]
φ := vectorize(arg(Z))
φ = [0; 0; 0; 0; 0; -69.5878] deg
# Временная диаграмма ЭДС источников :
t := 0, 0.0005 .. 0.02  # Мгновенные значения источников ЭДС
e1(t) := E_d[1]*sqrt(2)*sin(ω*t + ψE[1])
e2(t) := E_d[2]*sqrt(2)*sin(ω*t + ψE[2])
e3(t) := E_d[3]*sqrt(2)*sin(ω*t + ψE[3])
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ψE = [0; 0; 0]
# Рис. 2.1.2. Временная диаграмма источников ЭДС:  e1(t), e2(t) и e3(t)
# Решение СЛАУ для нахождения токов (правила Кирхгофа) :
# Определяем число уравнений для нахождения токов в ветвях цепи:
# - 1-й закон Кирхгофа: n1 =  k -1 =  4 - 1 = 3
# - 2-й закон Кирхгофа:  n2 =  p - n1 = 6 - 3 = 3,
# где: k - количество узлов цепи,  p - количество ветвей цепи (токов).
# Система  уравнений в нормализованной форме
# (все неизвестные строго на своем месте в каждом уравнении, свободные члены в правой части) :
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# a )
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I_1 - I_2 + I_3 + 0*I_4 + 0*I_5 + 0*I_6 == 0
# 1-й закон Кирхгофа
# n1 =  k -1 =  4 - 1 = 3
# b )
0 + I_2 + 0 - I_4 - I_5 + 0 == 0  # ! далее упрощаем запись !
(узлы)
# c )
-I_1 + 0 + 0 + I_4 + 0 + I_6 == 0
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# I )
Z_1*I_1 + Z_2*I_2 + 0 + Z_4*I_4 + 0 + 0 == E_1 + E_2
# 2-й закон Кирхгофа
# n2 =  p - n1 = 6 - 3 = 3
# II )
0 + Z_2*I_2 + Z_3*I_3 + 0 + Z_5*I_5 + 0 == E_2 + E_3
(контуры)
# III )
0 + 0 + 0 - Z_4*I_4 + Z_5*I_5 + Z_6*I_6 == 0
# Для решение  системы линейных алгебраических уравнений (СЛАУ) можно выбрать любой метод, например:  метод  обратной  матрицы
# Решение  СЛАУ  методом  обратной  матрицы
# (вектор неизвестных определяется умножением обратной матрицы коэффициентов на вектор правых частей уравнений).
ORIGIN := 1
A := [
    1, -1, 1, 0, 0, 0;
    0, 1, 0, -1, -1, 0;
    -1, 0, 0, 1, 0, 1;
    Z[1], Z[2], 0, Z[4], 0, 0;
    0, Z[2], Z[3], 0, Z[5], 0;
    0, 0, 0, -Z[4], Z[5], Z[6]
]
B := [0; 0; 0; E[1] + E[2]; E[2] + E[3]; 0]
I := A^-1*B
I = [10.2286 + 0.768941i; 12.5987 + 0.237594i; 2.37011 - 0.531347i; 8.31612 - 1.31757i; 4.28261 + 1.55516i; 1.91251 + 2.08651i]
# Действующие значения токов  на участках цепи: | Сопряженный вектор токов:
I_d := vectorize(|I|) = [10.2575; 12.601; 2.42894; 8.41985; 4.55624; 2.83041]
ψI := vectorize(arg(I)) = [4.29915; 1.08039; -12.636; -9.00285; 19.9577; 47.4914] deg
conj(I) = [10.2286 - 0.768941i; 12.5987 - 0.237594i; 2.37011 + 0.531347i; 8.31612 + 1.31757i; 4.28261 - 1.55516i; 1.91251 - 2.08651i]
ψIs := vectorize(arg(conj(I))) = [-4.29915; -1.08039; 12.636; 9.00285; -19.9577; -47.4914] deg
# Комплексные значения падений напряжения на сопротивлениях цепи:
U := vectorize(I*Z) = [102.286 + 7.68941i; 151.185 + 2.85113i; 47.4021 - 10.6269i; 66.5289 - 10.5405i; 21.4131 + 7.77581i; 45.1159 - 18.3164i]
U_d := vectorize(|U|) = [102.575; 151.212; 48.5787; 67.3588; 22.7812; 48.6922]
ψU := vectorize(arg(U)) = [4.29915; 1.08039; -12.636; -9.00285; 19.9577; -22.0964] deg
# Активная мощность потребляемая в ветвях:
P := vectorize(Re(U*conj(I))) = [1052.16; 1905.41; 117.995; 567.151; 103.797; 48.0672]
P_d := vectorize(|P|) = [1052.16; 1905.41; 117.995; 567.151; 103.797; 48.0672]
Pds := sum(P_d) = 3794.58
# Реактивная мощность в ветвях:
Q := vectorize(Im(U*conj(I))) = [0; 0; 0; 0; 0; -129.165]
Q_d := vectorize(|Q|) = [0; 0; 0; 0; 0; 129.165]
Qds := sum(Q_d) = 129.165
# Полная мощность в ветвях:
Sm := vectorize(U*conj(I)) = [1052.16; 1905.41; 117.995; 567.151; 103.797; 48.0672 - 129.165i]
Sm_d := vectorize(|Sm|) = [1052.16; 1905.41; 117.995; 567.151; 103.797; 137.819]
Sds := sqrt(Pds^2 + Qds^2) = 3796.78
# ___ Проверка ___
S1 := sqrt(sum(P_d)^2 + sum(Q_d)^2) = 3796.78
# Для  проверки  расчета  составляем  баланс  мощностей:
E_1*I_1 + E_2*I_2 + E_3*I_3 == Z_1*I_1^2 + Z_2*I_2^2 + Z_3*I_3^2 + Z_4*I_4^2 + Z_5*I_5^2 + Z_6*I_6^2
# !!! Мощность источника ЭДС (E*I) положительна при совпадении направлений ЭДС (E) и тока (I), проходящего через источник, и отрицательна при встречных направлениях ЭДС и тока. В первом случае источник ЭДС (E) является генератором энергии, а во втором случае  потребителем энергии !!!
# Расчет левой части уравнения - общая мощность генерации электроэнергии
Si := E[1]*I[1] + E[2]*I[2] + E[3]*I[3]
Si = 3794.58 + 129.165i
# Расчет правой части уравнения - общая мощность потребления электроэнергии
Sp := Z[1]*I[1]^2 + Z[2]*I[2]^2 + Z[3]*I[3]^2 + Z[4]*I[4]^2 + Z[5]*I[5]^2 + Z[6]*I[6]^2
Sp = 3794.58 + 129.165i
# Разбаланс (Вт) :
|Si| - |Sp| = 4.54747e-13
Spd := |Sp| = 3796.78
# Разбаланс  (%):
(|Si| - |Sp|)*100/|Si| = 1.19772e-14
# Временная диаграмма напряжения, тока и мощности потребителя RLC:
# Начальные ( t = 0) фазы напряжения  Up, тока  Ip.  Мощность приемника RLC:
ψ_Up := arg(U[ip]) = -22.0964 deg
ψ_Ip := arg(I[ip]) = 47.4914 deg
P[ip] = 48.0672
Q[ip] = -129.165
# Угол сдвига фазы тока  Ip  от  напряжения  Up и коэффициент мощности:
φ_p := ψ_Up - ψ_Ip = -69.5878 deg
sin(φ_p) = -0.937208
Cm := cos(φ_p) = 0.348771
# Все функции на диаграмме строят с условным сдвигом по оси времени (-ψ_U6/(360*f)), что соответствует повороту всех  вектор-функций на плоскости  {Re - Im}  на угол (-ψ_U6 ).
# В этом случае вектор-напряжение совпадает с осью Re, а ток фактический и ток сопряженный симметричны относительно оси Re и напряжения:  ( -φ □ + φ)
# Масштаб тока :
mi := 10
# Масштаб мощности :
ms := 1
# Аргумент - время (t).  Интервал изменения: 0 - 0,02сек (период). Шаг:  0,0005сек
t := 0, 0.0001 .. 0.02  # Ток сопряженный мгновенный:
up(t) := U_d[ip]*sqrt(2)*sin(ω*t)
ipp(t) := I_d[ip]*sqrt(2)*sin(ω*t - φ_p)
ips(t) := I_d[ip]*sqrt(2)*sin(ω*t + φ_p)
# Проверка: s(t) = p(t) + q(t)
sp(t) := up(t)*ips(t)
pp(t) := P[ip]*(1 - cos(2*ω*t))
qp(t) := Q[ip]*sin(2*ω*t)
pq(t) := pp(t) + qp(t)
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# Рис. 2.1.5.  Временная диаграмма тока  i6(t), напряжения u6(t)  и мощности p6(t), q6(t), s6(t)
# ПРИМЕЧАНИЕ в скрытой области:
# Вычисление угла сдвига фазы и коэффициента мощности по диаграмме 2.1.5
# Вычисленные ниже значения на диаграмме будут иметь место,  если в иследуемую ветвь R6 (приемник)  включить последовательно :
# -  катушку индуктивностью  L6  =  0,05 Генри,
# -  конденсатор емкостью  C6 =  0,0001 Фарады.
# Угол сдвига фазы тока  I6 от напряжения U6 на диаграмме 2.1.5 и коэффициент мощности :
dt := 0.00614 - 0.01
dt = -0.00386
φ_6d := dt*2*π/0.02
φ_6d = -69.48 deg
# annotation to a formula above: Математическое моделирование электрических цепей
Cmd := cos(φ_6d)
Cmd = 0.350534
# !!! Значения угла сдвига фаз и коэффициент мощности, вычисленные на диаграмме близки  расчитанным выше  !!!
