# Исходные данные:
E_1 := 190
R_1 := 18
R_4 := 45
R_2 := 5
E_2 := 148
R_5 := 9
R_3 := 15
E_3 := 174
R_6 := 10
МКТ
R_11 := R_1 + R_4 + R_5 = 72
R_1 = 18
R_22 := R_2 + R_3 + R_5 = 29
R_2 = 5
R_33 := R_3 + R_4 + R_6 = 70
R_3 = 15
R_4 = 45
E_1 = 190
R_12 := R_5 = 9
R_21 := R_12
R_5 = 9
E_2 = 148
R_13 := R_4 = 45
R_31 := R_13
R_6 = 10
E_3 = 174
R_23 := -R_3 = -15
R_32 := R_23
E_11 := E_1 = 190
E_22 := E_2 - E_3 = -26
E_33 := E_3 = 174
I_11 := 0
I_22 := 0
I_33 := 0
Given
I_11*R_11 + I_22*R_12 + I_33*R_13 == E_11
I_11*R_21 + I_22*R_22 + I_33*R_23 == E_22
I_11*R_31 + I_22*R_32 + I_33*R_33 == E_33
[I_11; I_22; I_33] := Find(I_11, I_22, I_33) = [2.36488; -1.27211; 0.692839]
I_1 := I_11 = 2.36488
I_2 := I_22 = -1.27211
I_3 := I_33 - I_22 = 1.96495
I_4 := I_11 + I_33 = 3.05772
I_5 := I_11 + I_22 = 1.09276
I_6 := I_33 = 0.692839
E_1*I_1 + E_2*I_2 + E_3*I_3 = 602.956
I_1^2*R_1 + I_2^2*R_2 + I_3^2*R_3 + I_4^2*R_4 + I_5^2*R_5 + I_6^2*R_6 = 602.956
ϕ_a := 0
МУП
R_1 = 18
G_bb := 1/R_3 + 1/R_4 + 1/R_5 = 0.2
E_1 = 190
R_2 = 5
E_2 = 148
G_cc := 1/R_1 + 1/R_4 + 1/R_6 = 0.177778
R_3 = 15
E_3 = 174
G_dd := 1/R_2 + 1/R_3 + 1/R_6 = 0.366667
R_4 = 45
R_5 = 9
G_bc := -1/R_4 = -0.0222222
G_cb := G_bc
R_6 = 10
G_bd := -1/R_3 = -0.0666667
G_db := G_bd
G_cd := -1/R_6 = -0.1
G_dc := G_cd
I_bb := E_3/R_3 = 11.6
I_cc := -E_1/R_1 = -10.5556
I_dd := -E_2/R_2 - E_3/R_3 = -41.2
R_1 = 18
E_1 = 190
R_2 = 5
E_2 = 148
ϕ_b := 0
ϕ_c := 0
ϕ_d := 0
R_3 = 15
E_3 = 174
Given
G_bb*ϕ_b + G_bc*ϕ_c + G_bd*ϕ_d == I_bb
R_4 = 45
G_cb*ϕ_b + G_cc*ϕ_c + G_cd*ϕ_d == I_cc
R_5 = 9
G_db*ϕ_b + G_dc*ϕ_c + G_dd*ϕ_d == I_dd
R_6 = 10
[ϕ_b; ϕ_c; ϕ_d] := Find(ϕ_b, ϕ_c, ϕ_d) = [-9.83488; -147.432; -154.361]
R_1 = 18
I_1 := (ϕ_c - ϕ_a + E_1)/R_1 = 2.36488
E_1 = 190
R_2 = 5
E_2 = 148
I_2 := (ϕ_d - ϕ_a + E_2)/R_2 = -1.27211
R_3 = 15
E_3 = 174
R_4 = 45
I_3 := (ϕ_d - ϕ_b + E_3)/R_3 = 1.96495
R_5 = 9
R_6 = 10
I_4 := (ϕ_b - ϕ_c)/R_4 = 3.05772
I_5 := (ϕ_a - ϕ_b)/R_5 = 1.09276
I_6 := (ϕ_c - ϕ_d)/R_6 = 0.692839
10/3 = 3.33333
E_1*I_1 + E_2*I_2 + E_3*I_3 = 602.956
I_1^2*R_1 + I_2^2*R_2 + I_3^2*R_3 + I_4^2*R_4 + I_5^2*R_5 + I_6^2*R_6 = 602.956
# МЭГ
R_1 = 18
E_1 = 190
U_ab := (E_1/(R_1 + R_4) + (E_2 - E_3)/(R_2 + R_3))/(1/(R_1 + R_4) + 1/(R_2 + R_3) + 1/R_5) = 9.69507
R_2 = 5
E_2 = 148
R_3 = 15
E_3 = 174
I_3xx := -(E_2 - E_3 - U_ab)/(R_2 + R_3) = 1.78475
R_4 = 45
R_5 = 9
I_4xx := (E_1 - U_ab)/(R_1 + R_4) = 2.86198
R_6 = 10
U_xx := E_3 - I_3xx*R_3 - I_4xx*R_4 = 18.4395
R_23 := R_2*R_3/(R_2 + R_3 + R_5) = 2.58621
R_25 := R_2*R_5/(R_2 + R_3 + R_5) = 1.55172
I_6 = 0.692839
R_35 := R_3*R_5/(R_2 + R_3 + R_5) = 4.65517
R_вх := R_23 + (R_1 + R_25)*(R_4 + R_35)/((R_1 + R_25) + (R_4 + R_35)) = 16.6143
I_6 := U_xx/(R_вх + R_6) = 0.692839
# СР2
j := sqrt(-1)
f := 50
E_6 := 252/sqrt(2)*e^(-j*π) = -178.191
R_6 := 24
X_L1 := 45
X_C1 := 6
L_1 := X_L1/(2*π*f) = 0.143239
C_1 := 1/(2*π*f*X_C1) = 0.000530516
МКТ
R_11 := R_1 + R_4 + R_5 = 72
R_1 = 18
R_22 := R_2 + R_3 + R_5 = 29
R_2 = 5
R_33 := R_3 + R_4 + R_6 + j*X_L1 - j*X_C1 = 84 + 39i
R_3 = 15
R_4 = 45
E_1 = 190
R_12 := R_5 = 9
R_21 := R_12
R_5 = 9
E_2 = 148
R_13 := R_4 = 45
R_31 := R_13
R_6 = 24
E_3 = 174
R_23 := -R_3 = -15
R_32 := R_23
E_11 := E_1 = 190
E_22 := E_2 - E_3 = -26
E_33 := E_3 + E_6 = -4.19091
I_11 := j
I_22 := 0
I_33 := 0
Given
I_11*R_11 + I_22*R_12 + I_33*R_13 == E_11
I_11*R_21 + I_22*R_22 + I_33*R_23 == E_22
I_11*R_31 + I_22*R_32 + I_33*R_33 == E_33
[I_11; I_22; I_33] := Find(I_11, I_22, I_33) = [4.33026 - 1.40992i; -3.29891 + 1.45398i; -2.04641 + 1.96507i]
I_1 := I_11 = 4.33026 - 1.40992i
I_2 := I_22 = -3.29891 + 1.45398i
I_3 := I_33 - I_22 = 1.2525 + 0.511095i
I_4 := I_11 + I_33 = 2.28385 + 0.555154i
I_5 := I_11 + I_22 = 1.03135 + 0.0440599i
I_6 := I_33 = -2.04641 + 1.96507i
|I_6| = 2.83713
deg^-1*arg(I_6) = 136.162
E_1*conj(I_1) + E_2*conj(I_2) + E_3*conj(I_3) + E_6*conj(I_6) = 917.098 + 313.923i
|I_1|^2*R_1 + |I_2|^2*R_2 + |I_3|^2*R_3 + |I_4|^2*R_4 + |I_5|^2*R_5 + |I_6|^2*R_6 = 917.098
|I_6|^2*(X_L1 - X_C1) = 313.923
B
E_1 = 190
I_1 = 4.33026 - 1.40992i
I_2 = -3.29891 + 1.45398i
I_3 = 1.2525 + 0.511095i
I_4 = 2.28385 + 0.555154i
